f(x, y) := -(x + y)/x
i := 0 .. 9
x1[0] := 1
y1[0] := 1/2
h1 := 0.1
x1[i + 1] := x1[i] + h1
y1[i + 1] := x1[i] + h1*f(x1[i], y1[i])
y1 = [0.5; 0.85; 0.922727; 1.02311; 1.1213; 1.21991; 1.31867; 1.41758; 1.51661; 1.61574; 1.71496]
x1 = [1; 1.1; 1.2; 1.3; 1.4; 1.5; 1.6; 1.7; 1.8; 1.9; 2]
k := 0 .. 7
yb[k + 1] := y1[k + 3] + h1*(55*f(x1[k + 3], y1[k + 3]) - 59*f(x1[k + 2], y1[k + 2]) + 37*f(x1[k + 1], y1[k + 1]) - 9*f(x1[k], y1[k]))/24
yb = [0; 0.831403; 0.941658; 1.03793; 1.13577; 1.23375; 1.33196; 1.43034; 1.52888]
