f(x, y) := -(x + y)/x
i := 0 .. 4
x1[0] := 1
y1[0] := 1/2
h1 := 0.2
x1[i + 1] := x1[i] + h1
y1[i + 1] := x1[i] + h1*f(x1[i], y1[i])
x1 = [1; 1.2; 1.4; 1.6; 1.8; 2]
y1 = [0.5; 0.7; 0.883333; 1.07381; 1.26577; 1.45936]
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i := 0 .. 9
x2[0] := 1
y2[0] := 1/2
h2 := 0.1
x2[i + 1] := x2[i] + h2
y2[i + 1] := x2[i] + h2*f(x2[i], y2[i])
x2 = [1; 1.1; 1.2; 1.3; 1.4; 1.5; 1.6; 1.7; 1.8; 1.9; 2]
y2 = [0.5; 0.85; 0.922727; 1.02311; 1.1213; 1.21991; 1.31867; 1.41758; 1.51661; 1.61574; 1.71496]
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i := 0 .. 10
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