i := 0 .. 9
x[0] := -1
h := 0.2
x[i + 1] := x[i] + h
x = [-1; -0.8; -0.6; -0.4; -0.2; 0; 0.2; 0.4; 0.6; 0.8; 1]
y1[i + 1] := 0.957*(-2*(x[i] + 1) + (x[i] + 1)^2) - 0.022*(-2*(x[i] + 1)^2 + (x[i] + 1)^3)
y2[i + 1] := 0.952*(-2*(x[i] + 1) + (x[i] + 1)^2) - 0.025*(-2*(x[i] + 1)^2 + (x[i] + 1)^3)
y1 = [0; 0; -0.342936; -0.606848; -0.792792; -0.901824; -0.935; -0.893376; -0.778008; -0.589952; -0.330264]
y2 = [0; 0; -0.34092; -0.60288; -0.78708; -0.89472; -0.927; -0.88512; -0.77028; -0.58368; -0.32652]
