d/dx(a*(-2*(x + 1) + (x + 1)^2) + b*(-2*(x + 1)^2 + (x + 1)^3)) → 2*a*x - b*(4*x - 3*(x + 1)^2 + 4)
d/dx(2*a*x - b*(4*x - 3*(x + 1)^2 + 4)) → 2*a + b*(6*x + 2)
[1 - c1 + 2*c2 == 0; 1 - 17*c1/16 - 49*c2/64 == 0] solve, [c1; c2] → [177/185, -4/185]
[177/185, -4/185] = [0.956757, -0.0216216]
